Boxed Wing
#Mach
0.75
#IYsym IZsym Zsym
0  0  0
#Sref  Cref  Bref
200 3.6002819525579515 42.42640687119285
#Xref Yref Zref
0.3  0.0  0.0806
CDdp
0.01

SURFACE
Lower wing
8  1.0  12  -2.0
COMPONENT
1
YDUPLICATE
0.0
ANGLE
0.0
SECTION
0.0 0.0 0.0 3.6002819525579515 0.0 0 0
SECTION
10.953354853020485 21.213203435596427 0.8902821578465115 1.1137632553523642 0.0 0 0

SURFACE
Right winglet
8  1.0  12  -2.0
COMPONENT
1
YDUPLICATE
0.0
ANGLE
0.0
SECTION
10.953354853020485 21.213203435596427 0.8902821578465115 1.1137632553523642 0.0 0 0
SECTION
26.731848998247038 21.213203435596427 10.0 1.1137632553523642 0.0 0 0

SURFACE
Upper wing
8  1.0  12  -2.0
COMPONENT
1
YDUPLICATE
0.0
ANGLE
0.0
SECTION
26.731848998247038 21.213203435596427 10.0 1.1137632553523642 0.0 0 0
SECTION
30.134554781964635 0.0 10.0 3.062062824699404 0.0 0 0
