Wing
#Mach
0.0
#IYsym IZsym Zsym
0  0  0
#Sref  Cref  Bref
427.8 12.227 61
#Xref Yref Zref
0  0.0  0
#CDcp
0.01

SURFACE
Wing
8 1.0 20 -2.0
YDUPLICATE
0.0
ANGLE
0.0
SECTION
0 0 0 12.227 0.0 0 0
CDCL
-0.5  1.200  0.0  1.00  1.5  1.200
SECTION
21.334 30.45 0.0 1.822 0.0 0 0
CDCL
-0.5  1.200  0.0  1.00  1.5  1.200
AFILE
n3414.dat
