Boxed Wing
#Mach
0.75
#IYsym IZsym Zsym
0  0  0
#Sref  Cref  Bref
400 4.830285110451153 63.245553203367585
#Xref Yref Zref
0.3  0.0  0.0806
CDcp
0.01

SURFACE
Lower wing
8  1.0  12  -2.0
COMPONENT
1
YDUPLICATE
0.0
ANGLE
0.0
SECTION
0.0 0.0 0.0 4.830285110451153 0.0 0 0
SECTION
16.23563027478275 31.622776601683793 1.3271542827333316 1.4942702098856062 0.0 0 0

SURFACE
Right winglet
8  1.0  12  -2.0
COMPONENT
1
YDUPLICATE
0.0
ANGLE
0.0
SECTION
16.23563027478275 31.622776601683793 1.3271542827333316 1.4942702098856062 0.0 0 0
SECTION
20.908475992049418 31.622776601683793 6.0 1.4942702098856062 0.0 0 0

SURFACE
Upper wing
8  1.0  12  -2.0
COMPONENT
1
YDUPLICATE
0.0
ANGLE
3.0
SECTION
20.908475992049418 31.622776601683793 6.0 1.4942702098856062 0.0 0 0
SECTION
30.106164174626844 0.0 6.0 4.405628411943784 0.0 0 0

SURFACE
Stab
6 1.0 15 -1.1
YDUPLICATE
0.0
ANGLE
0.0
SECTION
21.863 0 0 1.531 0.0 0 0
AFILE
n0010.dat.txt
SECTION
29.026 3.442 6 4.089 0.0 0 0
AFILE
n0010.dat.txt
