Test Wing
#Mach
0.7
#IYsym IZsym Zsym
0  0  0
#Sref  Cref  Bref
255.7 4.540666666666666 61.93
#Xref Yref Zref
0  0.0  0
#CDcp
0.021
>>>>>>> master

SURFACE
Wing
12 1.0 50 -2.0
YDUPLICATE
0.0
ANGLE
0.0
SECTION
0 0 0 6.37 0.0
SECTION
18.435 30.965 0.0 1.911 0.0
AFILE
n2414.dat.txt
